folder simulations: version=37; creator=Apsim 7.10-r0
  memo
    Viluco Stress window simulations.

    Stress window as per
    CHANGES IN DROUGHT TOLERANCE IN MAIZE ASSOCIATED WITH
    FIFTY YEARS OF BREEDING FOR YIELD IN THE U.S. CORN BELT1
    H. Campos*, M. Cooper, G.O. Edmeades, C. Löffler, J.R. Schussler, M. Ibañez
    Maydica 51 (2006): 369-381

    2001/2002

    Table 3
    TABLE 3 - Thermal times from planting for the cutoff of irrigation, onset of plant stress, time of rewatering and duration of stress period in
    the different treatments, 2001-2003. Mean anthesis date occurred at 696°Cd, and physiological maturity under optimal conditions at about
    1260°Cd.
    –––––––––––––––––––––––––––––––––––––––––––––––––––––––––––––––––––––––––––––––––––––––––––––––––––––––––––––––––––––––––––––––––––––––––––––––––––––––––––––––––––––––––
    2001/2002							2002/2003
    Code	Stress	Cut	Stress onset	Rewater	Duration	Cut	Stress onset	Rewater	Duration
    ————————	°Cd	————————	————————	°Cd	————————
    –––––––––––––––––––––––––––––––––––––––––––––––––––––––––––––––––––––––––––––––––––––––––––––––––––––––––––––––––––––––––––––––––––––––––––––––––––––––––––––––––––––––––
    FI	None	n/a	n/a	n/a	n/a	n/a	n/a	n/a	n/a
    S1	Flowering	256	476	774	298	291	511	849	338
    S2	Early fill	354	574	863	289	392	612	941	329
    S3	Mid fill	448	668	954	286	503	723	1025	302
    S4	Late fill	578	798	1080	282	641	861	1161	300
    S5	Terminal	764	984	Harvest	276	837	1057	Harvest	203
    –––––––––––––––––––––––––––––––––––––––––––––––––––––––––––––––––––––––––––––––––––––––––––––––––––––––––––––––––––––––––––––––––––––––––––––––––––––––––––––––––––––––––

    in DAS                                                   days after anthesis
    FI None
    S1	31	52	83           7
    S2	41	62	93           17
    S3	50	71	104        28
    S4	62	86	118        42
    S5	82	108	156        80

    flowering is 76 DAS
  simulation FL_None
    metfile met: filename=viluco0102.met
    clock
      start_date = 07/11/2001  # Enter the start date of the simulation
      end_date = 30/06/2002  # Enter the end date of the simulation
    summaryfile
    area paddock
      folder Manager folder
        manager Sow on a fixed date
          # Sowing criteria
          date = 7-Nov  # Enter sowing date (dd-mmm)
          # Sowing parameters
          crop = maize  # Enter name of crop to sow
          density = 9.0  # Enter sowing density (plants/m2)
          depth = 50  # Enter sowing depth (mm)
          cultivar = Pioneer_3394  # Enter cultivar
          class = plant  # Enter crop growth class
          row_spacing = 760  # Enter row spacing (mm)
          on start_of_day:
```
if (today = date('[date]') then 
   AccBaseTT   = 0
   [crop] sow plants =[density], sowing_depth = [depth], cultivar = [cultivar], row_spacing = [row_spacing], crop_class = [class]
endif
```
        manager Fertilise at sowing
          # When should fertiliser be applied
          modulename = maize  # On which module should the event come from
          eventname = sowing  # On which event should fertiliser be applied
          # Fertiliser application details
          fertmodule = fertiliser  # Module used to apply the fertiliser
          fert_amount_sow = 300  # Amount of starter fertiliser at sowing (kg/ha)
          fert_type_sow = urea_N  # Sowing fertiliser type
          on [modulename].[eventname]:
```
        [fertmodule] apply amount = [fert_amount_sow] (kg/ha), depth = 50 (mm), type = [fert_type_sow]
```
        manager Fertilise on fixed date
          # When should fertiliser be applied
          fert_date = 1-jan  # Enter fertiliser date (dd-mmm)
          fert_criteria = 1000  # Don't add fertiliser if N in top 2 layers exceeds (kg/ha)
          # Fertiliser application details
          fertmodule = Fertiliser  # Module used to apply the fertiliser
          fert_amount = 350  # Amount of fertiliser to apply (kg/ha)
          fert_type = urea_N  # Fertiliser type
          on start_of_day:
```
         if (today = date('[fert_date]') then
            N_topsoil = no3(1) + nh4(1) + no3(2) + nh4(2)
            if (N_topsoil < [fert_criteria]) then
               [fertmodule] apply amount = [fert_amount] (kg/ha), depth = 50 (mm), type = [fert_type] ()
            endif
         endif
```
        manager Harvesting rule
          # Harvesting criteria
          crop = maize  # Enter name of crop to harvest when ripe
          on end_of_day:
```
           if ('[crop]' = 'cotton') then
              if ([crop].ozcot_status > 0) then
                  [crop] harvest
              endif
           elseif ([crop].StageName = 'harvest_ripe' or [crop].plant_status = 'dead') then
              [crop]  harvest
              [crop]  end_crop
           endif
```
        manager Window
          on init:
```
startWindow = 1000
endWindow = 1000
number = 1
```
        manager Logic
          on init:
```
flowerDay = 0
flowerCounter = 0
irrigCounter = 0
irrigAmount = 25
BaseTT = 0
AccBaseTT  = 0
fasw = 1
gngs = 0
```
          on start_of_day:
```
if (daysAfterSowing = startWindow) then
    irrigAmount = 0
endif

if (stage = 7) then
   flowerDay = daysaftersowing
   flowerCounter = 0
endif

flowerCounter = flowerCounter + 1
irrigCounter = irrigCounter +1

if (flowerCounter = endWindow) then
   if (flowerday <> 0) then
      irrigAmount = 100
   endif     
endif

if (irrigCounter = 2) then
!   irrigation apply amount = irrigAmount
   irrigCounter = 0
endif

if (no3() < 200) then
    fertiliser apply amount = 200, type = no3_n, depth = 50
endif

tAverage = (maxT + minT) / 2
if (tAverage > 30) then
   tAverage = 35
endif

BaseTT  = tAverage - 10
AccBaseTT  = AccBaseTT  + BaseTT
```
          on end_of_day:
```
if (paddock_is_fallow() = 0) then
   earbio do_output
   GrainSize do_output
   outputfile do_output
endif

fasw = (sw_dep() - ll_dep()) / (dul_dep() - ll_dep())

gngs = GrainNo * GrainSize / 1000
```
      Soil Viluco: SoilType=Grey Vertosol; Site=Moonie; NearestTown=Moonie, Q 4406; Region=Darling Downs and Granite Belt; State=Queensland; Country=Australia; NaturalVegetation=Brigalow, Belah, Poplar Box; ApsoilNumber=81; Latitude=-27.779; Longitude=150.224; LocationAccuracy=+/- 20m; YearOfSampling=0; DataSource=CSIRO Sustainable Ecosystems, Toowoomba
        Comments=Soil naming structure: \State\Region\Classification-Local Name (Site/district and locator number)
        Water
          Thickness  BD    AirDry  LL15  DUL   SAT
          50         1.38  0.1     0.18  0.34  0.37
          100        1.38  0.1     0.18  0.34  0.37
          150        1.38  0.1     0.18  0.34  0.37
          150        1.33  0.1     0.18  0.34  0.37
          150        1.31  0.1     0.18  0.34  0.37
          300        1.26  0.1     0.18  0.34  0.37
          300        1.5   0.1     0.18  0.34  0.37
          150        1.5   0.1     0.18  0.34  0.37
          SAT source: Calculated from measured, estimated or calculated BD (layer 1, 2)
          SoilCrop maize: LL=[0.18, 0.18, 0.18, 0.18, 0.18, 0.18, 0.18, 0.18]; KL=[0.06, 0.06, 0.06, 0.06, 0.04, 0.04, 0.04, 0.04]; XF=[1, 1, 1, 1, 1, 1, 1, 1]
        SoilWater: SummerCona=1.5; SummerU=2; SummerDate=1-Nov; WinterCona=1.5; WinterU=2; WinterDate=1-Apr; DiffusConst=88; DiffusSlope=35.4; Salb=0.13; CN2Bare=73; CNRed=0.8; CNCov=0.2; Thickness=[150, 150, 300, 300, 300, 300, 300]; SWCON=[0.3, 0.3, 0.3, 0.3, 0.3, 0.3, 0.3]
        SoilOrganicMatter: RootCN=45; RootWt=1000; SoilCN=14.5; EnrACoeff=7.4; EnrBCoeff=0.2; OCUnits=WalkleyBlack
          Thickness  OC        FBiom  FInert
          50         0.953846  0.05   0.4
          100        0.953846  0.02   0.5
          150        0.961538  0.01   0.5
          150        0.846154  0.01   0.6
          150        0.546154  0.01   0.7
          300        0.261538  0.01   0.8
          300        0.2       0.01   0.9
          600        0.2       0.01   0.9
          OC source: Estimated based on local knowledge (layer 1, 2, 3, 4, 5, 6, 7)
        Analysis: Thickness=[50, 100, 150, 150, 150, 300, 100, 200, 600]; PH=[6.6, 6.6, 6.6, 6.6, 6.6, 6.6, 6.6, 6.6, 6.6]; PHUnits=Water; BoronUnits=HotWater
        InitialWater: FractionFull=1; PercentMethod=FilledFromTop; RelativeTo=ll15
        Sample Initial nitrogen: NO3Units=kgha; NH4Units=ppm; SWUnits=Volumetric; OCUnits=Total; PHUnits=Water
          Thickness  NO3  NH4
          1000       150  0
          200        10   0
          600        10   0
      maize
        maizeConstants standard: crop_type=maize; default_crop_class=plant; rue=1.85; row_spacing_default=1.0; retransRate=0.15; ratio_root_shoot=0   0   1    1     0.33  0.33  0.087 0    0     0    0    0; PGRt0=130; PGRt1=260; PGRbase=1.2; GNk=0.83; GNmaxCoef=170; GrainTempWindow=-50 100; x_lai=0.1    4; initial_tpla (mm^2/plant)=380; specific_root_length (mm/g)=100000; y_rel_root_rate (0-1)=0.02  0.10  1.0; transp_eff_cf (kpa)=0.009; no3_diffn_const (days)=2.0; maxUptakeRate=0.029; initialRootNConc=0.020; targetRootNConc=0.0106; initialLeafSLN=1.7; targetLeafSLN=1.7; newLeafSLN=1.1; senescedLeafSLN=0.3; leafDilnNSlope=0.0037; leafDilnNInt=-0.0015; initialStemNConc=0.01; x_stem_n=3         5       7         10; targetStemNConc=0.04   0.04   0.01      0.005; structStemNConc=0.0045  0.0045   0.0021   0.0021; stemDilnNSlope=0.005; stemDilnNInt=-0.00052; initialRachisNConc=0.000; targetRachisNConc=0.01; structRachisNConc=0.0021; rachisDilnNSlope=0.005; rachisDilnNInt=-0.00052; grainNFillRate (mg/grain/dd)=0.01; targetGrainNConc=0.0143; nUptakeCease=523; nSupplyFrac=5; leaf_no_dead_slope=0.00035; pfact_expansion_slope=2.5; pfact_grain_slope=20; x_p_stage_code=3       4      5      6      7      8      10; y_p_conc_max_leaf=0.0045  0.0045 0.004  0.0025 0.0025 0.0024 0.0024; y_p_conc_min_leaf=0.003   0.003  0.0029 0.0011 0.0011 0.0008 0.0006; y_p_conc_sen_leaf=0.0005  0.0005 0.0005 0.0005 0.0005 0.0005 0.0005; y_p_conc_max_stem=0.0045   0.0045 0.003  0.0011  0.001  0.0007 0.0007; y_p_conc_min_stem=0.003    0.003  0.002  0.0006 0.0006 0.0002 0.0002; y_p_conc_sen_stem=0.0002  0.0002 0.0002 0.0002 0.0002 0.0002 0.0002; y_p_conc_min_root=0.0010  0.0010 0.0010 0.0010 0.0010 0.0010 0.0010; y_p_conc_sen_root=0.0010  0.0010 0.0010 0.0010 0.0010 0.0010 0.0010; y_p_conc_min_flower=0.003   0.003   0.002  0.0006 0.0006 0.0002 0.0002; y_p_conc_sen_flower=0.0002  0.0002 0.0002 0.0002 0.0002 0.0002 0.0002; y_p_conc_sen_grain=0.001   0.001  0.001  0.001  0.001  0.0015  0.0015; p_conc_init_leaf=0.0045; p_conc_init_stem=0.0045; p_conc_init_flower=0.0045; p_conc_init_grain=0.0030; x_co2_te_modifier (ppm co2)=0  350  700   1000; y_co2_te_modifier=0  1.0  1.37  1.69
          stage_names=sowing germination emergence end_of_juvenile floral_initiation flag_leaf flowering start_grain_fill end_grain_fill maturity harvest_ripe end_crop
          root_depth_rate=0 33    33    33     33    33    33   0      0       0    0    0
          pesw_germ (mm/mm) = 0.0  # plant extractable soil water in seedling layer inadequate for germination (mm/mm)
          shoot_lag (oCd) = 15.0  # Time lag before linear coleoptile growth starts (deg days)
          shoot_rate (oCd/mm) = 0.60  # Growing deg day increase with depth for coleoptile (deg day/mm depth)
          twilight (o) = -6.0  # Degrees below the horizon
          x_temp (oC) = 0  18.0 26.0 34.0 44.0  # cardinal temps.
          y_tt (oC) = 0  10.0 18.0 26.0  0.0  # thermal time
          leaf_no_at_emerg = 0.5  # (expanded) leaf number at emergence ()
          leaf_no_seed = 6.0  # number of leaf primordia present in seed
          leaf_no_min = 5.0  # minimum leaf number
          leaf_no_max = 40.0  # maximum leaf number
          leaf_init_rate (oCd) = 23.2  # degree days to initiate each leaf primordium until floral init (deg day)
          leaf_app_rate1 = 65.0
          leaf_app_rate2 = 36.0
          leaf_app_rate3 = 36.0
          leaf_no_rate_change1 = 8
          leaf_no_rate_change2 = 3
          x_row_spacing (m) = 0.20   0.50   1.00  # Row spacing
          y_extinct_coef = 0.70   0.50   0.50  # extinction coefficient for green leaf
          x_ave_temp (oC) = 8 15 35 50  # mean daily temperature
          y_stress_photo = 0  1  1  0  # multiplier on RUE
          dm_leaf_init (g/plant) = 0.01  # leaf weight at emergence (g/plant)
          dm_root_init (g/plant) = 0.01  # root weight at emergence (g/plant)
          dm_stem_init (g/plant) = 0.01  # stem weight at emergence (g/plant)
          stem_trans_frac = 0.20  # fraction of stem used in translocation to grain
          leaf_trans_frac = 0.15  # fraction of leaf used in translocation to grain
          partition_rate_leaf = 0.0182  # coefficient of sigmoidal function between leaf partition fraction and internode no**2 (0-1)
          frac_stem2flower = 0.17  # fraction of dm allocated to stem that goes to developing head
          GrainHiTemperature = 32 33 36 38  # Grain High Temperature
          GrainStressSeverity = 0 0.14 0.23 0.65  # Severity of seed set stress
          grn_water_cont (g/g) = 0.155  # water content of grain g/g
          aX0 = 0.67  # Largest leaf position multiplier
          largestLeafParams = 1000  -1.17 0.047  # Largest Leaf Area Params
          bellCurveParams = -0.009 -0.2 0.0006 -0.43  # Leaf Curve Params
          leaf_no_correction = 2.0  # Correction for other growing leaves
          y_lai_sla_max = 50000 25000  # maximum specific leaf area for delta LAI
          lai_sla_min = 8000  8000  # minimum specific leaf area for delta LAI
          x_sw_ratio = 0.1 0.5  # water availability for effects on root depth growth
          y_sw_fac_root = 0   1  # stress factor for root depth growth, This may be probably the same for all crops
          x_afps = 0.0 0.02  # Air filled pore space for effects on root depth growth
          y_afps_fac_root = 1   1  # air filled pore space stress factor for root depth growth
          x_plant_rld (mm/mm3/plant) = 0   0.0001  0.0003  # root branching
          svp_fract = 0.75  # (0-1)
          x_sw_demand_ratio = 0.5 1.1  # water availability
          y_swdef_leaf = 0   1  # stress indices
          x_sw_avail_ratio = 0 0.16  # water availability
          y_swdef_pheno = 0 1  # stress index for phenology
          dm_root_sen_frac = 0.002  # fraction of root dry matter senesced each day
          leaf_no_dead_const = -0.025  # coefficients for rate of leaf number senescence following flowering
          sen_light_time_const (days) = 10.0  # delay factor for light senescence
          sen_radn_crit (Mj/m^2) = 2  # radiation level for onset of light senescence
          frost_kill (oC) = 1.0  # temperature threshold for leaf death
          sen_water_time_const (days) = 10.0  # delay factor for water senescence
          sen_threshold = 0.25  # supply:demand ratio for onset of water senescence
          tt_emerg_limit (oCd) = 150.0  # maximum degree days allowed for emergence to take place
          pfact_photo_slope = 2.5  # 2.0 !1.0
          pfact_pheno_slope = 6  # 10 !20
          p_uptake_factor = 1.5  # factor to calc total P uptake from demand for today's growth
          y_p_conc_max_root = 0.0010  0.0010 0.0010 0.0010 0.0010 0.0010 0.0010  # assume P conc in roots non-varying
          y_p_conc_max_flower = 0.0045  0.0045  0.003  0.0011  0.001  0.0007 0.0007  # assumed same as stem
          y_p_conc_max_grain = 0.001   0.001  0.001  0.001  0.001  0.0030  0.0030  # based on Mallarino (1996)
          y_p_conc_min_grain = 0.001   0.001  0.001  0.001  0.001  0.0015  0.0015  # based on Kenya data
          p_conc_init_root = 0.0010  # 0.0014
          minsw = 0.00001  # lowest acceptable value for ll
          x_stem_wt (g/stem) = 0    80  # look up table for canopy height
          y_height (mm) = 0  2000  # plant canopy height
          GrainClass = Cohort
        maizeGenotype Pioneer_3394
          tt_emerg_to_endjuv = 100  # (oC)
          tt_endjuv_to_init = 220
          photoperiod_crit1 = 12.5
          photoperiod_crit2 = 24.0
          photoperiod_slope = 0.0
          tt_flag_to_flower = 0
          tt_flower_to_start_grain = 170  # (oC)
          tt_flower_to_maturity = 911  # (oC)
          tt_maturity_to_ripe = 1
          GNmaxcoef = 190
          x_row_spacing = 0.20   0.50   1.00  # Row spacing
          y_extinct_coef = 0.70   0.350   0.350  # extinction coefficient for green leaf
          leaf_app_rate1 = 63.2634
          leaf_app_rate2 = 37.2698
          leaf_app_rate3 = 10
          leaf_no_rate_change1 = 11.0261
          leaf_no_rate_change2 = 3
          leaf_init_rate = 23.2
          root_depth_rate = 0  10    15    25     25    25    25   0      0       0    0    0
          rue = 1.85
          KernelsPerRing = 20
          signalStrength = 0.1
          aX0 = 0.65
          aMaxA = 900
          hgr_coef = 1.47
          minPGR = 0.637
          egrSlope = 1.253
          maxSilk = 770.5
          minEarBio = 0.53
          extrRate = 1.14
          minBioStress = 0
          minExtrStress = 0
          ttGrnNo = 270
          ttEarInit = 0
          silkDays = 3
          rlcRate = 0.15
          stemRSCfrac = 0.35
          kernelCobRatio = 0.15
          potKGR = 0.6
          kernelsPerCohort = 20
          nCohorts = 35
          ttSilkingBeforeShedding = 150
          ttSilkingDuration = 60
          emergeSilkLength = 150
          tempDependSilkElongRate = 1.5
          silkWaterStressFactor = 1
          sheddingPollenCount = 750
          cobK = 0.027
          potKernelWt = 335
          daysMaxPollen = 45
          pollenDistribution = 1125
          ttPollenViabilityWindow = 150
          pollenStressStartTemp = 36
          pollenStressHighTemp = 40
          minDailyPollen = 200
          applyStress2Silking = 1
          lagPhase = 170
          beta0 = 133.8
          beta1 = 0.9
          abortKernelFrac = 0.1
          minKGRfrac = 0.1
          KGRfrac = 1.4
          relMaxKGR = 0.02
          maxCohorts = 50
          potKernelWtFrac = 1.0
          dm_per_seed = 0.002
          leaf_no_dead_const = 0
          leaf_no_dead_slope = 0
          ActSilks = 0 600 1000
          pltGrowthRate = 0.04 0.2 0.4
          ringSize = 4.3
          silkNoWindow = 300 150
          abortFrac = 0.15
          x_silk_sw_demand_ratio = 0 1
      irrigation
        automatic_irrigation = off
        asw_depth = 1000  # Depth to which ASW is calculated. (mm)
        crit_fr_asw = 1.0  # Fraction of ASW below which irrigation is applied (0-1.0)
        irrigation_efficiency = 1  # Efficiency of the irrigation. (0-1.0)
        irrigation_allocation = off  # Allocation limits
        allocation = 0  # Allocation in mm
        default_no3_conc = 0.0  # Nitrate concentration (ppm N)
        default_nh4_conc = 0.0  # Ammonium concentration (ppm N)
        default_cl_conc = 0.0  # Chloride concentration (ppm Cl)
      fertiliser
      surfaceom SurfaceOrganicMatter
        PoolName = wheat_stubble  # Organic Matter pool name
        type = wheat  # Organic Matter type
        mass = 1000.  # Initial surface residue (kg/ha)
        cnr = 80.0  # C:N ratio of initial residue
        standing_fraction = 0.0  # Fraction of residue standing
      outputfile earbio: filename=FL_None earbio.out; title=FL_None earbio
        variables My Variables
          variable:
            dd/mm/yyyy as Date
            DaysAfterSowing
            deltatt
            Stage
            WaterSd
            silksPollinated
            pollenNumber
            pollenViability
            pollenFactor
            GrainNo
            GrainSize
            GrainGreenWt
            sheddingDas
            silkingDas
            ASI
            DMsupply
            dltEarDMDemand
            dltKernelDMDemand
            dltCobDMDemand
            cobWeight
            grainWeight
            dltDMCob
            dltDMKernels
            dltSilkElong
            Biomass units g/m^2 as BiomassWt
            maxt
            DeltaGreenWt
            esw
            flowerDay
            esw
            lai
            n_sd_ratio
            no3()
            number
            sw_uptake()
            gngs
            irrigation
      outputfile: filename=FL_None.out; title=FL_None
        variables
          variables: dd/mm/yyyy as Date, irrigation, sw_supply, sw_demand, sw(), AccBaseTT, DAysAfterSowing, fasw, BaseTT, stage, maxt, mint, vpd, radn
      operations Operations Schedule
        8/11/2001  irrigation apply amount = 6.77 (mm), depth = 100 (mm)
        12/11/2001  irrigation apply amount = 6.77 (mm), depth = 100 (mm)
        16/11/2001  irrigation apply amount = 10.155 (mm), depth = 100 (mm)
        17/11/2001  irrigation apply amount = 6.77 (mm), depth = 100 (mm)
        20/11/2001  irrigation apply amount = 13.54 (mm), depth = 100 (mm)
        23/11/2001  irrigation apply amount = 10.155 (mm), depth = 100 (mm)
        26/11/2001  irrigation apply amount = 13.54 (mm), depth = 100 (mm)
        30/11/2001  irrigation apply amount = 20.31 (mm), depth = 100 (mm)
        4/12/2001  irrigation apply amount = 27.08 (mm), depth = 100 (mm)
        7/12/2001  irrigation apply amount = 16.5865 (mm), depth = 100 (mm)
        8/12/2001  irrigation apply amount = 20.31 (mm), depth = 100 (mm)
        12/12/2001  irrigation apply amount = 27.08 (mm), depth = 100 (mm)
        16/12/2001  irrigation apply amount = 28.434 (mm), depth = 100 (mm)
        20/12/2001  irrigation apply amount = 30.465 (mm), depth = 100 (mm)
        24/12/2001  irrigation apply amount = 28.434 (mm), depth = 100 (mm)
        28/12/2001  irrigation apply amount = 37.235 (mm), depth = 100 (mm)
        1/01/2002  irrigation apply amount = 20.31 (mm), depth = 100 (mm)
        5/01/2002  irrigation apply amount = 30.465 (mm), depth = 100 (mm)
        9/01/2002  irrigation apply amount = 37.235 (mm), depth = 100 (mm)
        13/01/2002  irrigation apply amount = 30.465 (mm), depth = 100 (mm)
        17/01/2002  irrigation apply amount = 44.005 (mm), depth = 100 (mm)
        25/01/2002  irrigation apply amount = 81.24 (mm), depth = 100 (mm)
        28/01/2002  irrigation apply amount = 0 (mm), depth = 100 (mm)
        29/01/2002  irrigation apply amount = 33.85 (mm), depth = 100 (mm)
        30/01/2002  irrigation apply amount = 0 (mm), depth = 100 (mm)
        2/02/2002  irrigation apply amount = 30.465 (mm), depth = 100 (mm)
        6/02/2002  irrigation apply amount = 37.235 (mm), depth = 100 (mm)
        7/02/2002  irrigation apply amount = 0 (mm), depth = 100 (mm)
        10/02/2002  irrigation apply amount = 27.08 (mm), depth = 100 (mm)
        14/02/2002  irrigation apply amount = 30.465 (mm), depth = 100 (mm)
        18/02/2002  irrigation apply amount = 54.16 (mm), depth = 100 (mm)
        19/02/2002  irrigation apply amount = 0 (mm), depth = 100 (mm)
        22/02/2002  irrigation apply amount = 30.465 (mm), depth = 100 (mm)
        26/02/2002  irrigation apply amount = 33.85 (mm), depth = 100 (mm)
        2/03/2002  irrigation apply amount = 16.925 (mm), depth = 100 (mm)
        6/03/2002  irrigation apply amount = 23.695 (mm), depth = 100 (mm)
        10/03/2002  irrigation apply amount = 30.465 (mm), depth = 100 (mm)
        14/03/2002  irrigation apply amount = 23.695 (mm), depth = 100 (mm)
        18/03/2002  irrigation apply amount = 13.54 (mm), depth = 100 (mm)
        21/03/2002  irrigation apply amount = 10.155 (mm), depth = 100 (mm)
        25/03/2002  irrigation apply amount = 23.695 (mm), depth = 100 (mm)
        28/03/2002  irrigation apply amount = 14.894 (mm), depth = 100 (mm)
        1/04/2002  irrigation apply amount = 5.416 (mm), depth = 100 (mm)
        2/04/2002  irrigation apply amount = 0 (mm), depth = 100 (mm)
      outputfile GrainSize: filename=FL_None GrainSize.out; title=FL_None GrainSize; events=Reporting Frequency
        variables
          variables: dd/mm/yyyy as date, DaysAfterSowing, Stage, cohortNumber as dlayer, cohortGrainSize
  simulation S1_Flowering -> /simulations/FL_None
    area paddock -> /simulations/FL_None/paddock
      folder Manager folder -> /simulations/FL_None/paddock/Manager folder
        manager Window
          on init:
```
startWindow = 31 !After Sowing
EndWindow = 7 !After Flowering
number = 2
```
      outputfile earbio -> /simulations/FL_None/paddock/earbio: filename=S1_Flowering earbio.out; title=S1_Flowering earbio
        variables My Variables -> /simulations/FL_None/paddock/earbio/My Variables
      outputfile GrainSize -> /simulations/FL_None/paddock/GrainSize: filename=S1_Flowering GrainSize.out; title=S1_Flowering GrainSize
        variables -> /simulations/FL_None/paddock/GrainSize/Variables
        events Reporting Frequency -> /simulations/FL_None/paddock/GrainSize/Reporting Frequency
      outputfile -> /simulations/FL_None/paddock/Outputfile: filename=S1_Flowering.out; title=S1_Flowering
        variables -> /simulations/FL_None/paddock/Outputfile/Variables
      operations Operations Schedule
        8/11/2001  irrigation apply amount = 6.77 (mm), depth = 100 (mm)
        12/11/2001  irrigation apply amount = 6.77 (mm), depth = 100 (mm)
        16/11/2001  irrigation apply amount = 10.155 (mm), depth = 100 (mm)
        17/11/2001  irrigation apply amount = 6.77 (mm), depth = 100 (mm)
        20/11/2001  irrigation apply amount = 13.54 (mm), depth = 100 (mm)
        23/11/2001  irrigation apply amount = 10.155 (mm), depth = 100 (mm)
        26/11/2001  irrigation apply amount = 13.54 (mm), depth = 100 (mm)
        30/11/2001  irrigation apply amount = 20.31 (mm), depth = 100 (mm)
        4/12/2001  irrigation apply amount = 27.08 (mm), depth = 100 (mm)
        7/12/2001  irrigation apply amount = 50 (mm), depth = 100 (mm)
        29/01/2002  irrigation apply amount = 33.85 (mm), depth = 100 (mm)
        30/01/2002  irrigation apply amount = 33.85 (mm), depth = 100 (mm)
        2/02/2002  irrigation apply amount = 30.465 (mm), depth = 100 (mm)
        6/02/2002  irrigation apply amount = 37.235 (mm), depth = 100 (mm)
        10/02/2002  irrigation apply amount = 27.08 (mm), depth = 100 (mm)
        14/02/2002  irrigation apply amount = 30.465 (mm), depth = 100 (mm)
        18/02/2002  irrigation apply amount = 54.16 (mm), depth = 100 (mm)
        22/02/2002  irrigation apply amount = 30.465 (mm), depth = 100 (mm)
        26/02/2002  irrigation apply amount = 33.85 (mm), depth = 100 (mm)
        2/03/2002  irrigation apply amount = 16.925 (mm), depth = 100 (mm)
        6/03/2002  irrigation apply amount = 23.695 (mm), depth = 100 (mm)
        10/03/2002  irrigation apply amount = 30.465 (mm), depth = 100 (mm)
        14/03/2002  irrigation apply amount = 23.695 (mm), depth = 100 (mm)
        18/03/2002  irrigation apply amount = 13.54 (mm), depth = 100 (mm)
        21/03/2002  irrigation apply amount = 10.155 (mm), depth = 100 (mm)
        25/03/2002  irrigation apply amount = 23.695 (mm), depth = 100 (mm)
        28/03/2002  irrigation apply amount = 14.894 (mm), depth = 100 (mm)
        1/04/2002  irrigation apply amount = 5.416 (mm), depth = 100 (mm)
  simulation S2_EarlyFill -> /simulations/FL_None
    area paddock -> /simulations/FL_None/paddock
      folder Manager folder -> /simulations/FL_None/paddock/Manager folder
        manager Window
          on init:
```
startWindow = 41 !After Sowing
EndWindow = 17 !After Flowering
number = 3
```
      outputfile earbio -> /simulations/FL_None/paddock/earbio: filename=S2_EarlyFill earbio.out; title=S2_EarlyFill earbio
        variables My Variables -> /simulations/FL_None/paddock/earbio/My Variables
      outputfile GrainSize -> /simulations/FL_None/paddock/GrainSize: filename=S2_EarlyFill GrainSize.out; title=S2_EarlyFill GrainSize
        variables -> /simulations/FL_None/paddock/GrainSize/Variables
        events Reporting Frequency -> /simulations/FL_None/paddock/GrainSize/Reporting Frequency
      outputfile -> /simulations/FL_None/paddock/Outputfile: filename=S2_EarlyFill.out; title=S2_EarlyFill
        variables -> /simulations/FL_None/paddock/Outputfile/Variables
      operations Operations Schedule
        8/11/2001  irrigation apply amount = 6.77 (mm), depth = 100 (mm)
        12/11/2001  irrigation apply amount = 6.77 (mm), depth = 100 (mm)
        16/11/2001  irrigation apply amount = 10.155 (mm), depth = 100 (mm)
        17/11/2001  irrigation apply amount = 6.77 (mm), depth = 100 (mm)
        20/11/2001  irrigation apply amount = 13.54 (mm), depth = 100 (mm)
        23/11/2001  irrigation apply amount = 10.155 (mm), depth = 100 (mm)
        26/11/2001  irrigation apply amount = 13.54 (mm), depth = 100 (mm)
        30/11/2001  irrigation apply amount = 20.31 (mm), depth = 100 (mm)
        4/12/2001  irrigation apply amount = 27.08 (mm), depth = 100 (mm)
        7/12/2001  irrigation apply amount = 16.5865 (mm), depth = 100 (mm)
        8/12/2001  irrigation apply amount = 20.31 (mm), depth = 100 (mm)
        12/12/2001  irrigation apply amount = 27.08 (mm), depth = 100 (mm)
        16/12/2001  irrigation apply amount = 28.434 (mm), depth = 100 (mm)
        7/02/2002  irrigation apply amount = 67.7 (mm), depth = 100 (mm)
        10/02/2002  irrigation apply amount = 27.08 (mm), depth = 100 (mm)
        14/02/2002  irrigation apply amount = 30.465 (mm), depth = 100 (mm)
        18/02/2002  irrigation apply amount = 54.16 (mm), depth = 100 (mm)
        22/02/2002  irrigation apply amount = 30.465 (mm), depth = 100 (mm)
        26/02/2002  irrigation apply amount = 33.85 (mm), depth = 100 (mm)
        2/03/2002  irrigation apply amount = 16.925 (mm), depth = 100 (mm)
        6/03/2002  irrigation apply amount = 23.695 (mm), depth = 100 (mm)
        10/03/2002  irrigation apply amount = 30.465 (mm), depth = 100 (mm)
        14/03/2002  irrigation apply amount = 23.695 (mm), depth = 100 (mm)
        18/03/2002  irrigation apply amount = 13.54 (mm), depth = 100 (mm)
        21/03/2002  irrigation apply amount = 10.155 (mm), depth = 100 (mm)
        25/03/2002  irrigation apply amount = 23.695 (mm), depth = 100 (mm)
        28/03/2002  irrigation apply amount = 14.894 (mm), depth = 100 (mm)
        1/04/2002  irrigation apply amount = 5.416 (mm), depth = 100 (mm)
  simulation S3_MidFill -> /simulations/FL_None
    area paddock -> /simulations/FL_None/paddock
      folder Manager folder -> /simulations/FL_None/paddock/Manager folder
        manager Window
          on init:
```
startWindow = 50 !After Sowing
EndWindow = 28 !After Flowering
number = 4
```
      outputfile earbio -> /simulations/FL_None/paddock/earbio: filename=S3_MidFill earbio.out; title=S3_MidFill earbio
        variables My Variables -> /simulations/FL_None/paddock/earbio/My Variables
      outputfile GrainSize -> /simulations/FL_None/paddock/GrainSize: filename=S3_MidFill GrainSize.out; title=S3_MidFill GrainSize
        variables -> /simulations/FL_None/paddock/GrainSize/Variables
        events Reporting Frequency -> /simulations/FL_None/paddock/GrainSize/Reporting Frequency
      outputfile -> /simulations/FL_None/paddock/Outputfile: filename=S3_MidFill.out; title=S3_MidFill
        variables -> /simulations/FL_None/paddock/Outputfile/Variables
      operations Operations Schedule
        8/11/2001  irrigation apply amount = 6.77 (mm), depth = 100 (mm)
        12/11/2001  irrigation apply amount = 6.77 (mm), depth = 100 (mm)
        16/11/2001  irrigation apply amount = 10.155 (mm), depth = 100 (mm)
        17/11/2001  irrigation apply amount = 6.77 (mm), depth = 100 (mm)
        20/11/2001  irrigation apply amount = 13.54 (mm), depth = 100 (mm)
        23/11/2001  irrigation apply amount = 10.155 (mm), depth = 100 (mm)
        26/11/2001  irrigation apply amount = 13.54 (mm), depth = 100 (mm)
        30/11/2001  irrigation apply amount = 20.31 (mm), depth = 100 (mm)
        4/12/2001  irrigation apply amount = 27.08 (mm), depth = 100 (mm)
        7/12/2001  irrigation apply amount = 16.5865 (mm), depth = 100 (mm)
        8/12/2001  irrigation apply amount = 20.31 (mm), depth = 100 (mm)
        12/12/2001  irrigation apply amount = 27.08 (mm), depth = 100 (mm)
        16/12/2001  irrigation apply amount = 28.434 (mm), depth = 100 (mm)
        20/12/2001  irrigation apply amount = 30.465 (mm), depth = 100 (mm)
        24/12/2001  irrigation apply amount = 28.434 (mm), depth = 100 (mm)
        18/02/2002  irrigation apply amount = 54.16 (mm), depth = 100 (mm)
        19/02/2002  irrigation apply amount = 33.85 (mm), depth = 100 (mm)
        22/02/2002  irrigation apply amount = 30.465 (mm), depth = 100 (mm)
        26/02/2002  irrigation apply amount = 33.85 (mm), depth = 100 (mm)
        2/03/2002  irrigation apply amount = 16.925 (mm), depth = 100 (mm)
        6/03/2002  irrigation apply amount = 23.695 (mm), depth = 100 (mm)
        10/03/2002  irrigation apply amount = 30.465 (mm), depth = 100 (mm)
        14/03/2002  irrigation apply amount = 23.695 (mm), depth = 100 (mm)
        18/03/2002  irrigation apply amount = 13.54 (mm), depth = 100 (mm)
        21/03/2002  irrigation apply amount = 10.155 (mm), depth = 100 (mm)
        25/03/2002  irrigation apply amount = 23.695 (mm), depth = 100 (mm)
        28/03/2002  irrigation apply amount = 14.894 (mm), depth = 100 (mm)
        1/04/2002  irrigation apply amount = 5.416 (mm), depth = 100 (mm)
  simulation S4_LateFill -> /simulations/FL_None
    area paddock -> /simulations/FL_None/paddock
      folder Manager folder -> /simulations/FL_None/paddock/Manager folder
        manager Window
          on init:
```
startWindow = 62 !After Sowing
EndWindow = 42 !After Flowering
number = 5
```
      outputfile earbio -> /simulations/FL_None/paddock/earbio: filename=S4_LateFill earbio.out; title=S4_LateFill earbio
        variables My Variables -> /simulations/FL_None/paddock/earbio/My Variables
      outputfile GrainSize -> /simulations/FL_None/paddock/GrainSize: filename=S4_LateFill GrainSize.out; title=S4_LateFill GrainSize
        variables -> /simulations/FL_None/paddock/GrainSize/Variables
        events Reporting Frequency -> /simulations/FL_None/paddock/GrainSize/Reporting Frequency
      outputfile -> /simulations/FL_None/paddock/Outputfile: filename=S4_LateFill.out; title=S4_LateFill
        variables -> /simulations/FL_None/paddock/Outputfile/Variables
      operations Operations Schedule
        8/11/2001  irrigation apply amount = 6.77 (mm), depth = 100 (mm)
        12/11/2001  irrigation apply amount = 6.77 (mm), depth = 100 (mm)
        16/11/2001  irrigation apply amount = 10.155 (mm), depth = 100 (mm)
        17/11/2001  irrigation apply amount = 6.77 (mm), depth = 100 (mm)
        20/11/2001  irrigation apply amount = 13.54 (mm), depth = 100 (mm)
        23/11/2001  irrigation apply amount = 10.155 (mm), depth = 100 (mm)
        26/11/2001  irrigation apply amount = 13.54 (mm), depth = 100 (mm)
        30/11/2001  irrigation apply amount = 20.31 (mm), depth = 100 (mm)
        4/12/2001  irrigation apply amount = 27.08 (mm), depth = 100 (mm)
        7/12/2001  irrigation apply amount = 16.5865 (mm), depth = 100 (mm)
        8/12/2001  irrigation apply amount = 20.31 (mm), depth = 100 (mm)
        12/12/2001  irrigation apply amount = 27.08 (mm), depth = 100 (mm)
        16/12/2001  irrigation apply amount = 28.434 (mm), depth = 100 (mm)
        20/12/2001  irrigation apply amount = 30.465 (mm), depth = 100 (mm)
        24/12/2001  irrigation apply amount = 28.434 (mm), depth = 100 (mm)
        28/12/2001  irrigation apply amount = 37.235 (mm), depth = 100 (mm)
        1/01/2002  irrigation apply amount = 20.31 (mm), depth = 100 (mm)
        5/01/2002  irrigation apply amount = 30.465 (mm), depth = 100 (mm)
        6/03/2002  irrigation apply amount = 23.695 (mm), depth = 100 (mm)
        10/03/2002  irrigation apply amount = 30.465 (mm), depth = 100 (mm)
        14/03/2002  irrigation apply amount = 23.695 (mm), depth = 100 (mm)
        18/03/2002  irrigation apply amount = 13.54 (mm), depth = 100 (mm)
        21/03/2002  irrigation apply amount = 10.155 (mm), depth = 100 (mm)
        25/03/2002  irrigation apply amount = 23.695 (mm), depth = 100 (mm)
        28/03/2002  irrigation apply amount = 14.894 (mm), depth = 100 (mm)
        1/04/2002  irrigation apply amount = 5.416 (mm), depth = 100 (mm)
  simulation S5_Terminal -> /simulations/FL_None
    area paddock -> /simulations/FL_None/paddock
      folder Manager folder -> /simulations/FL_None/paddock/Manager folder
        manager Window
          on init:
```
startWindow = 82 !After Sowing
EndWindow = 80 !After Flowering
number = 6
```
      outputfile earbio -> /simulations/FL_None/paddock/earbio: filename=S5_Terminal earbio.out; title=S5_Terminal earbio
        variables My Variables -> /simulations/FL_None/paddock/earbio/My Variables
      outputfile GrainSize -> /simulations/FL_None/paddock/GrainSize: filename=S5_Terminal GrainSize.out; title=S5_Terminal GrainSize
        variables -> /simulations/FL_None/paddock/GrainSize/Variables
        events Reporting Frequency -> /simulations/FL_None/paddock/GrainSize/Reporting Frequency
      outputfile -> /simulations/FL_None/paddock/Outputfile: filename=S5_Terminal.out; title=S5_Terminal
        variables -> /simulations/FL_None/paddock/Outputfile/Variables
      operations Operations Schedule
        8/11/2001  irrigation apply amount = 6.77 (mm), depth = 100 (mm)
        12/11/2001  irrigation apply amount = 6.77 (mm), depth = 100 (mm)
        16/11/2001  irrigation apply amount = 10.155 (mm), depth = 100 (mm)
        17/11/2001  irrigation apply amount = 6.77 (mm), depth = 100 (mm)
        20/11/2001  irrigation apply amount = 13.54 (mm), depth = 100 (mm)
        23/11/2001  irrigation apply amount = 10.155 (mm), depth = 100 (mm)
        26/11/2001  irrigation apply amount = 13.54 (mm), depth = 100 (mm)
        30/11/2001  irrigation apply amount = 20.31 (mm), depth = 100 (mm)
        4/12/2001  irrigation apply amount = 27.08 (mm), depth = 100 (mm)
        7/12/2001  irrigation apply amount = 16.5865 (mm), depth = 100 (mm)
        8/12/2001  irrigation apply amount = 20.31 (mm), depth = 100 (mm)
        12/12/2001  irrigation apply amount = 27.08 (mm), depth = 100 (mm)
        16/12/2001  irrigation apply amount = 28.434 (mm), depth = 100 (mm)
        20/12/2001  irrigation apply amount = 30.465 (mm), depth = 100 (mm)
        24/12/2001  irrigation apply amount = 28.434 (mm), depth = 100 (mm)
        28/12/2001  irrigation apply amount = 37.235 (mm), depth = 100 (mm)
        1/01/2002  irrigation apply amount = 20.31 (mm), depth = 100 (mm)
        5/01/2002  irrigation apply amount = 30.465 (mm), depth = 100 (mm)
        9/01/2002  irrigation apply amount = 37.235 (mm), depth = 100 (mm)
        13/01/2002  irrigation apply amount = 30.465 (mm), depth = 100 (mm)
        17/01/2002  irrigation apply amount = 44.005 (mm), depth = 100 (mm)
        25/01/2002  irrigation apply amount = 81.24 (mm), depth = 100 (mm)
        28/01/2002  irrigation apply amount = 50 (mm), depth = 100 (mm)
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